<?xml version="1.0" encoding="UTF-8"?>

<piston_engine name="Continental_TSIO-520-P">

   <displacement unit="IN3">520.00</displacement>
   <bore unit="IN">5.25</bore>
   <stroke unit="IN">4.0</stroke>
   <cylinders>6.0</cylinders>
   <compression-ratio>7.5</compression-ratio>
   <maxhp>285.00</maxhp>
   <cycles>4.0</cycles>
   <idlerpm>600.0</idlerpm>
   <maxrpm>2600.0</maxrpm>
   <starter-torque>300</starter-torque>
   <static-friction>0.5</static-friction>

   <!--<ram-air-factor>1.25</ram-air-factor>-->
   <ram-air-factor>0.75</ram-air-factor>
   <air-intake-impedance-factor>0</air-intake-impedance-factor>

   <maxmp unit="INHG">28.8</maxmp>
   <minmp unit="INHG">10</minmp>

   <boostmanual>1</boostmanual>
   <numboostspeeds>1</numboostspeeds>
   <boostoverride>0</boostoverride>
   <boost-loss-factor>0</boost-loss-factor>
   <ratedboost1 unit="INHG">5.58</ratedboost1> <!-- 35.5 inHg  -->
   <ratedrpm1>2600</ratedrpm1>
   <ratedpower1>285</ratedpower1>
   <ratedaltitude1>17000</ratedaltitude1>
   <takeoffboost>3.2317943</takeoffboost> <!-- 36.5 inHg in PSI -->

   <sparkfaildrop>0.082</sparkfaildrop>
   <volumetric-efficiency>0.8447</volumetric-efficiency>
   <bsfc unit="LBS/HP*HR">0.4811</bsfc>

   <cylinder-head-mass unit="LBS">25</cylinder-head-mass>
   <cooling-factor>0.36</cooling-factor>

</piston_engine>
